# VARIFLEX Partition System

Dataset: ILCD process, EPD, specific dataset
Geography: DE
Reference year: 2012
Valid until: 2017
Classification: OEKOBAU.DAT: Komposite / Systembauteile / Innenwände
Classification: IBUCategories: 02 Bauprodukte / Raumtrennsysteme / Raumtrennsysteme
Method details: Raumtrennsysteme.pdf
Owner: DORMA Hüppe Raumtrennsysteme GmbH + Co. KG
Compliance: DIN EN 15804; ISO 14025
Review: Accredited third party review by IBU
Amounts: rows without a unit in brackets have none in this file; such an amount is in the reference unit of its flow, which a separate flow dataset defines
copyright: false

## General comment
The VARIFLEX is a horizontally operable soundinsulating
partition system of steel and aluminium
construction comprised of independently moving
individual elements with the following
characteristics:

Wide range of design alternatives
Freely oscillating mounted cover panels for
optimum acoustic performance
Element heights up to 14.5 m

## Technology and included processes
The element frame is constructed from vertical aluminium profiles and horizontal steel profiles. The aluminium vertical profiles are cut to size and provided at the end with recesses for the PU end caps and the sealing strips. Holes are stamped at the positions where the horizontal steel profiles are connected. The steel profiles are sawn to length, stamped and recessed. Sealing extrusions and magnetic strips are inserted in the chambers of the vertical profiles. The top and bottom sealing strips are provided by assembling together cut aluminium profiles and PU mouldings. Thrust tubes of steel and compression springs for operating the sealing strips are prefabricated by pressure-joining the individual components to create an interference fit. The horizontal steel profiles and the vertical aluminium profiles are secured to an assembly bench. The vertical profiles are bolted at the ends to the horizontal profiles. Thus completes assembly of the baseframe for the partition element. An actuator in the form of a spindle system (preassembled by the subsupplier) based on the same operating principle as a car jack is fitted to the centre horizontal profile. The prefabricated thrust tubes and an operating tube are welded to this actuator. The pre-assembled sealing strips are mounted on the top and bottom ends of the thrust tubes by means of split pins. Mineral wool is inserted in the cavities of the element frame thus created. The mineral wool is covered on both sides of the element frame with adhesive-bonded kraft paper. Coated particle board is cut to the required size to create the cover panels for the two faces of the element. Sawdust, chips, swarf and residues are vacuumed up and collected. Suspension-type attachments are bolted at the required position on the back of the particle board cover panels to enable subsequent attachment to the element frame. The cover panels and the element frames are packed on pallets. Due to the high weights of the individual components and assemblies, they are packed separately for transport to and handling at the site. The elements are made up by simply hanging and clamping the cover panels to the frames on site. The offcuts are collected and sent to a disposal company for recycling (see section 2.16).
Technical data:
Sound insulation index R in [dB] = 38 dB to 57 dB per DIN EN ISO 140-3:2005
Heat transfer coefficient (U value) in [W/(m²K)] = 0.55 to 0.67 – calculated in accordance with ISO 6946
Load arising from the partition weight in [kN/m²] = 0.36 to 0.59
Declared unit:
The declared unit is 1 m2 of the fullwall element of
the VARIFLEX partition system (movable wall)
including packaging materials but excluding the
associated fixing materials and the interfaces with
the stationary wall, floor and ceiling.

## Technical purpose
The separate, independently operable elements are
moved into the required position on ceiling-mounted
tracks. The elements feature a manual crankoperated
spindle mechanism enabling them to be
clamped in position for enhanced stability and
effective sealing against the floor, wall and ceiling
track.

The partition system offers flexible, transparent
room occupancy with multifunctional and open
spatial configuration:

Areas and rooms can be divided by operable VARIFLEX partitions

Room sizes can be adapted to group size
High level of sound insulation means different events can be held simultaneously in adjacent rooms
Areas and rooms can be used with greater efficiency
Applications include: Offices, hotels, conference
centres, fairs and exhibitions, schools, religious
amenities and studios

## Reference product
- VARIFLEX Vollelement 1m²: 1

## Inputs
- Erneuerbare Primärenergie als Energieträger (PERE) [MJ]: A1 856, A2 0.381, A3 -4.23, A4 1.02, A5 0.101, C2 0.249, C3 2.3, D -132
- Erneuerbare Primärenergie zur stofflichen Nutzung (PERM) [MJ]: A1 0, A2 0, A3 0, A4 0, A5 0, C2 0, C3 0, D 0
- Total erneuerbare Primärenergie (PERT) [MJ]: A1 856, A2 0.381, A3 -4.23, A4 1.02, A5 0.101, C2 0.249, C3 2.3, D -132
- Nicht-erneuerbare Primärenergie als Energieträger (PENRE) [MJ]: A1 1520, A2 9.6, A3 -15.4, A4 25.6, A5 2.15, C2 6.38, C3 -48.4, D -1020
- Nicht-erneuerbare Primärenergie zur stofflichen Nutzung (PENRM) [MJ]: A1 0.000664, A2 0, A3 2.68e-9, A4 0, A5 1.98e-10, C2 0, C3 2.46e-6, D -2.06e-8
- Total nicht erneuerbare Primärenergie (PENRT) [MJ]: A1 1520, A2 9.6, A3 -15.4, A4 25.6, A5 2.15, C2 6.38, C3 -48.4, D -1020
- Einsatz von Sekundärstoffen (SM) [kg]: A1 5.73, A2 0, A3 0, A4 0, A5 0, C2 0, C3 0, D 0
- Erneuerbare Sekundärbrennstoffe (RSF) [MJ]: A1 0, A2 0, A3 0, A4 0, A5 0, C2 0, C3 0, D 0
- Nicht erneuerbare Sekundärbrennstoffe (NRSF) [MJ]: A1 0, A2 0, A3 0, A4 0, A5 0, C2 0, C3 0, D 0
- Einsatz von Süßwasserressourcen (FW) [m^3]: A1 355, A2 0.0355, A3 -4.41, A4 0.0949, A5 0.339, C2 0.024, C3 2.8, D -0.336

## Outputs
- Gefährlicher Abfall zur Deponie (HWD) [kg]: A1 0.00218, A2 0, A3 0, A4 0, A5 0, C2 0, C3 0.0595, D -0.0804
- Entsorgter nicht gefährlicher Abfall (NHWD) [kg]: A1 155, A2 0.0504, A3 -4.84, A4 0.135, A5 0.772, C2 0.0225, C3 -51.9, D -63.6
- Entsorgter radioaktiver Abfall (RWD) [kg]: A1 0.0386, A2 1.35e-5, A3 -0.00064, A4 3.62e-5, A5 4.29e-5, C2 8.88e-6, C3 0.00375, D -0.0439
- Komponenten für die Wiederverwendung (CRU) [kg]: A1 0, A2 0, A3 0, A4 0, A5 0, C2 0, C3 0, D 0
- Stoffe zum Recycling (MFR) [kg]: A1 0, A2 0, A3 0.399, A4 0, A5 0, C2 0, C3 7.79, D 0
- Stoffe für die Energierückgewinnung (MER) [kg]: A1 0, A2 0, A3 2.43, A4 0, A5 7.88, C2 0, C3 34.3, D 0
- Exportierte elektrische Energie (EEE) [MJ]: A1 0, A2 0, A3 6.39, A4 0, A5 19.3, C2 0, C3 154, D 0
- Exportierte thermische Energie (EET) [MJ]: A1 0, A2 0, A3 18.8, A4 0, A5 46.9, C2 0, C3 139, D 0

## Impact indicators
- Globales Erwärmungspotenzial (GWP) [kg CO_(2)-Äq.]: A1 34.9, A2 0.694, A3 3.5, A4 1.85, A5 14.6, C2 0.462, C3 58.5, D -68.2
- Abbau Potential der stratosphärischen Ozonschicht (ODP) [kg CFC11-Äq.]: A1 2.07e-5, A2 4.11e-11, A3 -9.55e-9, A4 9.96e-11, A5 -1.24e-8, C2 1.71e-10, C3 1.05e-7, D -3.04e-6
- Versauerungspotenzial von Boden und Wasser (AP) [kg SO_(2)-Äq.]: A1 0.371, A2 0.00321, A3 -0.00631, A4 0.00847, A5 0.000932, C2 0.00232, C3 -0.00788, D -0.172
- Eutrophierungspotenzial (EP) [kg PO_(4)^(3)-Äq.]: A1 0.0372, A2 0.000322, A3 -0.000464, A4 0.000842, A5 9.92e-5, C2 0.000255, C3 -0.00301, D -0.0127
- Bildungspotential für troposphärisches Ozon (POCP) [kg Ethen-Äq.]: A1 0.0409, A2 0.000765, A3 -0.000107, A4 0.00202, A5 0.000267, C2 0.000538, C3 0.00219, D -0.0105
- Potenzial für den abiotischen Abbau nicht fossiler Ressourcen (ADPE) [kg Sb-Äq.]: A1 0.00179, A2 3.17e-8, A3 -1.14e-6, A4 8.49e-8, A5 3.57e-7, C2 1.82e-8, C3 -6.13e-6, D -1.42e-5
- Potenzial für den abiotischen Abbau fossiler Brennstoffe (ADPF) [MJ]: A1 1360, A2 9.56, A3 -13.8, A4 25.6, A5 2.15, C2 6.36, C3 -59.6, D -892

## Use advice
Scope:
The life cycle assessment (LCA) is based on data acquired for the 2011-2012 financial year (June 30 to June 30) at the production site in Westerstede/Ocholt, Germany.
System boundary:
EPD type: Cradle to grave (with options)
In accordance with EN 15804, the following
modules have been given consideration:

Product stage: A1 – A3
The extraction and processing of the raw materials
and biomass production and processing, including
all relevant upstream activities, the provision of
electricity, steam and heat from primary fuels, and
also the extraction, refining and transportation of
same, together with the necessary delivery transportation
to the factory gate and manufacture
of the packaging are incorporated in this module.
For further information, please consult section 3.8.

Construction stage: A4 – A5
This module encompasses the distribution channels
and the process of energy recovery from the
packaging materials.

End of Life stage: C2 – C3
Included in this module are transportation to the
recycling facility and the collection, processing and
recovery processes applied.

Credits: D
The resultant value streams arising from material
recycling and energy recovery for the downstream
product system are indicated in this module.
The life cycle assessment was prepared for the
reference territory of Germany. This means that, in
addition to the production processes performed
under these conditions, the upstream stages
relevant for Germany, such as electricity generation
or fuel provision, have also been taken into account.

## Data sources
- VARIFLEX Raumtrennsystem.pdf
- GaBi Database (all versions)
- GaBi database SP20 2013
