# MOVEO Partition System Fullwall Element

Dataset: ILCD process, EPD, specific dataset
Geography: DE
Reference year: 2012
Valid until: 2017
Classification: OEKOBAU.DAT: Komposite / Systembauteile / Innenwände
Classification: IBUCategories: 02 Bauprodukte / Raumtrennsysteme / Raumtrennsysteme
Method details: Raumtrennsysteme.pdf
Owner: DORMA Hüppe Raumtrennsysteme GmbH + Co. KG
Compliance: DIN EN 15804; ISO 14025
Review: Accredited third party review by IBU
Amounts: rows without a unit in brackets have none in this file; such an amount is in the reference unit of its flow, which a separate flow dataset defines
copyright: true

## General comment
The MOVEO is a horizontally operable soundinsulating partition system of closed composite construction comprised of independently moving individual elements with the following characteristics:
High stability with low weights per unit area
Easy operability of the movable walls
ComforTronic for maximum ease of use and enhanced safety and security
ComfortDrive – the fully automatic version
Designed for intercompatibility: All the product versions and models of the MOVEO system family can be readily combined

## Technology and included processes
1. Cutting / Pre-assembly Aluminium profiles for the rectangular baseframe are sawn to length. Sealing rail extrusions are inserted and fixed in chambers especially provided for this purpose in the horizontal and vertical profiles. The profiles are assembled together to form the frame using plastic angle brackets. The top and bottom sealing strips are provided by assembling together cut aluminium profiles and PU mouldings. Coated MDF boards are sawn to size to provide the cover panels both sides. Sawdust, chips, swarf and residues are vacuumed up and collected. The cover panels are provided with and edge using hotmelt adhesive around their periphery. 2. Final installation The pre-assembled frames and the prepared cover panels are joined together in a fully automatic hotmelt bonding machine to produce the partition element shells. Mineral wool is introduced into the element cavity. Electric sealing strip actuators are mounted on the top and bottom profiles. Roller carriers are also bolted to the top load-bearing profile. The prefabricated sealing strips are clipped onto the actuator units. Contact connectors are bolted on both ends above the vertical profiles with a cable connecting them to the actuator unit. The completed partition elements are electrically tested (extension and retraction of the top and bottom sealing strips) and then packed on a pallet for shipment. The offcuts are collected and sent to a disposal company for recycling (see section 2.16).
Technical data:
Sound insulation index R in [dB] = 38 dB to 55 dB per DIN EN ISO 140-3:2005
Heat transfer coefficient (U value) in [W/(m²K)] = 0.42 to 0.46 – calculated in accordance with ISO 6946
Load arising from the partition weight in [kN/m²] = 0.16 to 0.40
Declared unit:
The declared unit is 1 m² of the fullwall element of the MOVEO partition system (movable wall), excluding the associated fixing components and sealants at the interfaces with the stationary wall, floor and ceiling.

## Technical purpose
The separate, independently operable elements are moved into the required position on ceiling-mounted tracks. The elements are controlled by a ComforTronic actuator which uses an electric motor
to automatically retract and extend the sealing strips, in the latter case ensuring maximum sound insulation and stability of the partition. The power is transmitted from element to element via end face contacts. All the partition functions are microprocessor-monitored.
The partition system offers flexible space utilisation thanks to multifunctional and open room configuration possibilities:

Movable MOVEO walls serve to separate areas and rooms
Room sizes can be adapted to group size
High level of sound insulation means different events can be held simultaneously in adjacent rooms
Areas and rooms can be more efficiently utilised
Areas of application include: Offices, hotels, conference centres, fairs and exhibitions, schools, religious amenities and studios

## Reference product
- MOVEO Vollelement: 1

## Inputs
- Erneuerbare Primärenergie als Energieträger (PERE) [MJ]: A1 707, A2 0.232, A3 -24.3, A4 0.631, A5 0.101, B6 172, C2 0.162, C3 -1.68, D -205
- Erneuerbare Primärenergie zur stofflichen Nutzung (PERM) [MJ]: A1 0, A2 0, A3 0, A4 0, A5 0, B6 0, C2 0, C3 0, D 0
- Total erneuerbare Primärenergie (PERT) [MJ]: A1 707, A2 0.232, A3 -24.3, A4 0.631, A5 0.101, B6 172, C2 0.162, C3 -1.68, D -205
- Nicht-erneuerbare Primärenergie als Energieträger (PENRE) [MJ]: A1 1680, A2 5.83, A3 -122, A4 16.2, A5 2.15, B6 1180, C2 4.16, C3 -258, D -975
- Nicht-erneuerbare Primärenergie zur stofflichen Nutzung (PENRM) [MJ]: A1 0.00142, A2 0, A3 1.24e-9, A4 0, A5 1.98e-10, B6 0, C2 0, C3 9.86e-9, D -3.43e-8
- Total nicht erneuerbare Primärenergie (PENRT) [MJ]: A1 1680, A2 5.83, A3 -122, A4 16.2, A5 2.15, B6 1180, C2 4.16, C3 -258, D -975
- Einsatz von Sekundärstoffen (SM) [kg]: A1 3.67, A2 0, A3 0, A4 0, A5 0, B6 0, C2 0, C3 0, D 0
- Erneuerbare Sekundärbrennstoffe (RSF) [MJ]: A1 0, A2 0, A3 0, A4 0, A5 0, B6 0, C2 0, C3 0, D 0
- Nicht erneuerbare Sekundärbrennstoffe (NRSF) [MJ]: A1 0, A2 0, A3 0, A4 0, A5 0, B6 0, C2 0, C3 0, D 0
- Einsatz von Süßwasserressourcen (FW) [m^3]: A1 676, A2 0.0216, A3 -3.84, A4 0.0608, A5 0.339, B6 246, C2 0.0156, C3 0.361, D -0.32

## Outputs
- Gefährlicher Abfall zur Deponie (HWD) [kg]: A1 0.172, A2 0, A3 0, A4 0, A5 0, B6 0, C2 0, C3 0.0992, D -0.134
- Entsorgter nicht gefährlicher Abfall (NHWD) [kg]: A1 269, A2 0.0303, A3 -16.5, A4 0.0569, A5 0.772, B6 252, C2 0.0146, C3 -26, D -73.4
- Entsorgter radioaktiver Abfall (RWD) [kg]: A1 0.0708, A2 8.23e-6, A3 -0.00618, A4 2.25e-5, A5 4.29e-5, B6 0.169, C2 5.79e-6, C3 -0.00703, D -0.0634
- Komponenten für die Wiederverwendung (CRU) [kg]: A1 0, A2 0, A3 0, A4 0, A5 0, B6 0, C2 0, C3 0, D 0
- Stoffe zum Recycling (MFR) [kg]: A1 0, A2 0, A3 0.562, A4 0, A5 0, B6 0, C2 0, C3 6.25, D 0
- Stoffe für die Energierückgewinnung (MER) [kg]: A1 0, A2 0, A3 4.06, A4 0, A5 7.88, B6 0, C2 0, C3 24.3, D 0
- Exportierte elektrische Energie (EEE) [MJ]: A1 0, A2 0, A3 13.9, A4 0, A5 19.4, B6 0, C2 0, C3 80, D 0
- Exportierte thermische Energie (EET) [MJ]: A1 0, A2 0, A3 4.68, A4 0, A5 46.9, B6 0, C2 0, C3 32, D 0

## Impact indicators
- Globales Erwärmungspotenzial (GWP) [kg CO_(2)-Äq.]: A1 78.9, A2 0.422, A3 -1.54, A4 1.16, A5 14.6, B6 67.5, C2 0.301, C3 24.6, D -68.8
- Abbau Potential der stratosphärischen Ozonschicht (ODP) [kg CFC11-Äq.]: A1 1.05e-5, A2 2.89e-11, A3 -2.06e-7, A4 4.32e-10, A5 -1.24e-8, B6 4.41e-6, C2 1.11e-10, C3 -5.59e-7, D -5.04e-6
- Versauerungspotenzial von Boden und Wasser (AP) [kg SO_(2)-Äq.]: A1 0.657, A2 0.00194, A3 -0.0298, A4 0.00557, A5 0.000932, B6 0.288, C2 0.00152, C3 0.0139, D -0.246
- Eutrophierungspotenzial (EP) [kg PO_(4)^(3)-Äq.]: A1 0.0552, A2 0.00046, A3 -0.000603, A4 0.00127, A5 0.000267, B6 0.0155, C2 0.000351, C3 0.00454, D -0.0121
- Bildungspotential für troposphärisches Ozon (POCP) [kg Ethen-Äq.]: A1 0.0615, A2 0.000194, A3 -0.00182, A4 0.000569, A5 9.92e-5, B6 0.0175, C2 0.000166, C3 -0.000622, D -0.0155
- Potenzial für den abiotischen Abbau nicht fossiler Ressourcen (ADPE) [kg Sb-Äq.]: A1 0.00479, A2 1.92e-8, A3 -2.81e-6, A4 4.6e-8, A5 3.57e-7, B6 5.54e-6, C2 1.18e-8, C3 -8.22e-5, D -2.13e-5
- Potenzial für den abiotischen Abbau fossiler Brennstoffe (ADPF) [MJ]: A1 1450, A2 5.81, A3 -102, A4 16.1, A5 2.15, B6 770, C2 4.15, C3 -221, D -788

## Use advice
Scope:
The life cycle assessment (LCA) is based on data acquired for the 2011-2012 financial year (June 30 to June 30) at the production site in Westerstede/Ocholt, Germany.
System boundary:
EPD type: Cradle to grave (with options)
In accordance with EN 15804, the following modules have been given consideration:

Product stage: A1 – A3
The extraction and processing of the raw materials and biomass production and processing, including all relevant upstream activities, the provision of electricity, steam and heat from primary fuels, and also the extraction, refining and transportation of same, together with the necessary delivery transportation to the factory gate and manufacture of the packaging are incorporated in this module. For further information, please consult section 3.8.

Construction stage: A4 – A5
This module encompasses the distribution channels and the process of energy recovery from the packaging materials.

Use stage: B6
The use stage relates to the operation of the building and encompasses the energy input for operation of the declared product.
End of life stage: C2 – C3
Included in this module are transportation to the recycling facility and the collection, processing and recovery processes applied.

Credits: D
The resultant value streams arising from material recycling and energy recovery for the downstream product system are indicated in this module. The life cycle assessment was prepared for the reference territory of Germany. This means that, in addition to the production processes performed under these conditions, the upstream stages relevant for Germany, such as electricity generation or fuel provision, have also been taken into account.

## Data sources
- MOVEO Raumtrennsystem.pdf
- GaBi Database (all versions)
- GaBi database SP20 2013
