# VARITRANS Partition System

Dataset: ILCD process, EPD, representative dataset
Geography: DE
Reference year: 2012
Valid until: 2017
Classification: OEKOBAU.DAT: Komposite / Systembauteile / Innenwände
Classification: IBUCategories: 02 Bauprodukte / Raumtrennsysteme / Raumtrennsysteme
Method details: Raumtrennsysteme.pdf
Owner: DORMA Hüppe Raumtrennsysteme GmbH + Co. KG
Compliance: DIN EN 15804; ISO 14025
Review: Accredited third party review by IBU
Amounts: rows without a unit in brackets have none in this file; such an amount is in the reference unit of its flow, which a separate flow dataset defines
copyright: true

## General comment
The VARITRANS is a horizontally operable singlepane
safety glass partition system comprised of
independently moving individual elements with the
following characteristics:

Openness with intrinsic aesthetic allure
Elegant design giving an integrated appearance
Flexible modular system with many equipment and door solution alternatives
Manual and fully automatic operation

## Technology and included processes
The glass pane for the partition element is positioned on an assembly bench. Clamp-type profiles are placed at the top and bottom of the glass using assembly templates and then secured with screw fasteners. The presized aluminium profiles are placed over these clamp-type profiles on both sides (to perform both a load-bearing and aesthetic function) and then secured with sheet steel retainers. Prefabricated carrier assemblies with support track rollers are then inserted from the side into the cover profiles on the top of the glass element and secured with clamping screws. Floor bolts and latching catches are mounted on the bottom of the glass element in the same way. The open sides between the cover profiles are closed with screw-fastened end caps. Following a functional check, the glass elements are packed with intermediate layers of polystyrene on pallets ready for shipment. The production waste is separately collected and sent to a disposal company for recycling (see section 2.16).
Technical data:
Glass thickness 10 and 12 mm TSG
Load arising from the partition weight in [kN/m²] = 0.25 to 0.34
Declared unit:
The declared unit is 1 m2 of the fullwall element of
the VARITRANS partition system (movable wall)
including packaging materials but excluding the
associated fixing materials and the interfaces with
the stationary wall, floor and ceiling.

## Technical purpose
The independently operable single-pane safety
glass elements are moved into the required position
on ceiling-mounted tracks. The functional elements
are integrated in the hardware.
The partition system offers flexible, transparent
room occupancy with multifunctional spatial
configuration:

Areas and rooms can be divided by operable VARITRANS partitions
The translucent elements ensure that the penness, spacious feel and brightness of the area are retained
Areas and rooms can be used with greater efficiency
Applications include: Self-service areas in banks,
shops, exhibition and presentation rooms and foyers

## Reference product
- VARITRANS Vollelement 1m²: 1

## Inputs
- Erneuerbare Primärenergie als Energieträger (PERE) [MJ]: A1 393, A2 0.0618, A3 -14.5, A4 0.473, A5 0.0784, C2 0.0661, C3 1.02, D -126
- Erneuerbare Primärenergie zur stofflichen Nutzung (PERM) [MJ]: A1 0, A2 0, A3 0, A4 0, A5 0, C2 0, C3 0, D 0
- Total erneuerbare Primärenergie (PERT) [MJ]: A1 393, A2 0.0618, A3 -14.5, A4 0.473, A5 0.0784, C2 0.0661, C3 1.02, D -126
- Nicht-erneuerbare Primärenergie als Energieträger (PENRE) [MJ]: A1 1190, A2 1.56, A3 -41.7, A4 11.9, A5 1.9, C2 2.17, C3 7.15, D -610
- Nicht-erneuerbare Primärenergie zur stofflichen Nutzung (PENRM) [MJ]: A1 0.000741, A2 0, A3 0, A4 0, A5 2.18e-10, C2 3.56e-6, C3 0.0023, D -1.23e-6
- Total nicht erneuerbare Primärenergie (PENRT) [MJ]: A1 1190, A2 1.56, A3 -41.7, A4 11.9, A5 1.9, C2 2.17, C3 7.15, D -610
- Einsatz von Sekundärstoffen (SM) [kg]: A1 24.6, A2 0, A3 0, A4 0, A5 0, C2 0, C3 0, D 0
- Erneuerbare Sekundärbrennstoffe (RSF) [MJ]: A1 0, A2 0, A3 0, A4 0, A5 0, C2 0, C3 0, D 0
- Nicht erneuerbare Sekundärbrennstoffe (NRSF) [MJ]: A1 0, A2 0, A3 0, A4 0, A5 0, C2 0, C3 0, D 0
- Einsatz von Süßwasserressourcen (FW) [m^3]: A1 558, A2 0.00576, A3 -15.4, A4 0.0441, A5 0.339, C2 0.0611, C3 0.682, D -0.918

## Outputs
- Gefährlicher Abfall zur Deponie (HWD) [kg]: A1 0.00123, A2 0, A3 0, A4 0, A5 0, C2 0, C3 0.0554, D -0.0748
- Entsorgter nicht gefährlicher Abfall (NHWD) [kg]: A1 140, A2 0.00818, A3 -7.5, A4 0.0629, A5 0.645, C2 0.0051, C3 -7.52, D -109
- Entsorgter radioaktiver Abfall (RWD) [kg]: A1 0.0414, A2 2.2e-6, A3 -0.00272, A4 1.68e-5, A5 2.53e-5, C2 2.02e-6, C3 0.00116, D -0.0429
- Komponenten für die Wiederverwendung (CRU) [kg]: A1 0, A2 0, A3 0, A4 0, A5 0, C2 0, C3 0, D 0
- Stoffe zum Recycling (MFR) [kg]: A1 0, A2 0, A3 0.345, A4 0, A5 0, C2 0, C3 28.5, D 0
- Stoffe für die Energierückgewinnung (MER) [kg]: A1 0, A2 0, A3 0, A4 0, A5 8.67, C2 0, C3 0.101, D 0
- Exportierte elektrische Energie (EEE) [MJ]: A1 0, A2 0, A3 0, A4 0, A5 19.8, C2 0, C3 0.716, D 0
- Exportierte thermische Energie (EET) [MJ]: A1 0, A2 0, A3 0, A4 0, A5 47.7, C2 0, C3 0.57, D 0

## Impact indicators
- Globales Erwärmungspotenzial (GWP) [kg CO_(2)-Äq.]: A1 70.2, A2 0.113, A3 -3.5, A4 0.861, A5 15.3, C2 0.15, C3 0.77, D -46.3
- Abbau Potential der stratosphärischen Ozonschicht (ODP) [kg CFC11-Äq.]: A1 7.52e-6, A2 6.51e-12, A3 -4.32e-8, A4 4.63e-11, A5 -1.37e-8, C2 7.4e-9, C3 7.38e-8, D -2.86e-6
- Versauerungspotenzial von Boden und Wasser (AP) [kg SO_(2)-Äq.]: A1 0.539, A2 0.000515, A3 -0.0205, A4 0.00393, A5 0.000824, C2 0.000776, C3 -0.00113, D -0.194
- Eutrophierungspotenzial (EP) [kg PO_(4)^(3)-Äq.]: A1 0.0563, A2 0.000123, A3 -0.000926, A4 0.000936, A5 0.000278, C2 0.000198, C3 0.000103, D -0.0172
- Bildungspotential für troposphärisches Ozon (POCP) [kg Ethen-Äq.]: A1 0.0353, A2 5.13e-5, A3 -0.0011, A4 0.000391, A5 9.77e-5, C2 9.62e-5, C3 -0.000444, D -0.0126
- Potenzial für den abiotischen Abbau nicht fossiler Ressourcen (ADPE) [kg Sb-Äq.]: A1 0.00137, A2 5.14e-9, A3 -1.12e-6, A4 3.94e-8, A5 2.73e-7, C2 1.2e-7, C3 6.41e-7, D -0.00274
- Potenzial für den abiotischen Abbau fossiler Brennstoffe (ADPF) [MJ]: A1 1070, A2 1.55, A3 -35.1, A4 11.9, A5 1.96, C2 2.12, C3 2.26, D -487

## Use advice
Scope:
The life cycle assessment (LCA) is based on data acquired for the 2011-2012 financial year (June 30 to June 30) at the production site in Westerstede/Ocholt, Germany.
System boundary:
EPD type: Cradle to grave (with options)
In accordance with EN 15804, the following
information modules have been given consideration:

Product stage: A1 – A3
The extraction and processing of the raw materials,
including all relevant upstream activities, the
provision of electricity, steam and heat from primary
fuels, and also the extraction, refining and
transportation of same, together with the necessary
delivery transportation to the factory gate and
manufacture of the packaging are incorporated in
this module.

Construction stage: A4 – A5
This module encompasses the distribution channels
and the process of energy recovery from the
packaging materials.

End of Life stage: C2 – C3
Included in this module are transportation to the
recycling facility and the collection, processing and
recovery processes applied.

Credits: D
The resultant value streams arising from material
recycling and energy recovery for the downstream
product system are indicated in this module.
The life cycle assessment (“ecobalance”) was
prepared for the reference territory of Germany. This
means that, in addition to the production processes
performed under these conditions, the upstream
stages relevant for Germany, such as electricity
generation or fuel provision, have also been taken
into account.

## Data sources
- VARITRANS Raumtrennsystem.pdf
- GaBi Database (all versions)
- GaBi database SP20 2013
